units         metal
atom_style    atomic
atom_modify   map yes
newton        on

boundary p p p

#read_data structure.data
read_data data.CPI

variable        p_id world   1

variable        temperature equal 300.0
variable        temperature2 equal 300.0
variable        tempDamp equal 100.0 # approx 0.1 ps

variable        pressure equal 1.00
variable        pressureDamp equal 500.0

variable        seed world 1428


mass            1 132.905  # Cs
mass            2 126.900  # I
mass            3 207.2  # Pb


pair_style  grace
pair_coeff  * * /users/pahlawat/.cache/grace/MP_GRACE_2L_r6_11Nov2024 Cs I Pb


neighbor 1.0 bin
neigh_modify delay 5 every 1

#write_dump all custom output.dump id type x y z fx fy fz
#
variable freq equal 100
#variable dt equal 0.001

thermo          ${freq}
thermo_style    custom step temp pe ke etotal press lx ly lz xy xz yz
restart         ${freq} restart.0 restart.2

#minimize 0.0 1.0e-3 100 10000

# NVT

dump            myDump1 all atom 100 out.0.lammpstrj
fix             1 all temp/csvr ${temperature} ${temperature} $(100.0*dt) ${seed}
fix             2 all nve
timestep        0.002
velocity        all create ${temperature} ${seed} dist gaussian
run             1000
unfix           1
unfix           2
write_data      data.NVT
undump          myDump1
reset_timestep  0

# NPT
dump            myDump3 all atom 100 out.1.lammpstrj
fix             1 all plumed plumedfile plumed.dat outfile plumed.log
fix             2 all temp/csvr ${temperature} ${temperature2} $(500.0*dt) ${seed}
fix             3 all nph tri ${pressure} ${pressure} $(500.0*dt)
fix             4 all momentum 10000 linear 1 1 1
run             50000000
unfix           1
unfix           2
unfix           3
unfix           4
undump          myDump3
write_restart   restart.file
write_data      data.eq
